// SBML level 3 version 1

model second_order_reversible()
  // model units - substance: item, time: second, volume: litre, extent: item

  // Compartments:
  compartment V = 1;

  // Species:
  substanceOnly species a in V = 500;
  substanceOnly species b in V = 500;
  substanceOnly species c in V = 500;
  substanceOnly species d in V = 50;
  substanceOnly species e in V = 50;
  substanceOnly species f in V = 50;

  // Reactions:
  forward_1: a + b => c; 0.002*a*b;
  backward_1: c => a + b; 1*c;
  forward_2: d + e => f; 0.02*d*e;
  backward_2: f => d + e; 1*f;

  // Unit definitions:
  unit per_second = 1 / second;
end
