// SBML level 3 version 1
// and then torn down and rebuilt by hand to work with lm
// to prep for lm:
// rm -f biphasic_switch*.lm
// lm_sbml_import biphasic_switch.lm biphasic_switch.sbml
// lm_setdm biphasic_switch.lm numberReactions=14 numberSpecies=7 numberSiteTypes=1 "latticeSize=[32,32,32]" latticeSpacing=31.25e-9 particlesPerSite=8 "DiffusionMatrix=[8.15e-14]" "ReactionLocationMatrix=[1]";
// to run for lm:
// cp biphasic_switch.lm data/biphasic_switch_direct.lm
// lm_setp data/biphasic_switch_direct.lm writeInterval=1e2 maxTime=5e9
// lm -r 1-10 -sl lm::cme::GillespieDSolver -c 4 -cr 1 -gr 1/4 -f data/biphasic_switch_direct.lm
// for xanthus lm -r 1-31 -sl lm::cme::GillespieDSolver -cr 1 -gr 1/16 -f data/biphasic_switch_direct.lm

model biphasic_swtich_stoch()
  // model units - substance: substance, time: time, volume: volume, area: area, length: length, extent: substance

  // Compartments:
  compartment cell = 1 litre;

  // Species:
  substanceOnly species A in cell = 4;  // substance in item
  substanceOnly species A2 in cell = 16;  // substance in item
  substanceOnly species OA2 in cell = 0;  // substance in item
  substanceOnly species B in cell = 1;  // substance in item
  substanceOnly species B2 in cell = 1;  // substance in item
  substanceOnly species OB2 in cell = 0;  // substance in item
  substanceOnly species O in cell = 1;  // substance in item

  // Parameters:
  c = 1;

  // Reactions:
  dimerization_A: 2 A => A2; cell*(5/2)*2*c*A*(A - 1);
  dedimerization_A: A2 => 2 A; cell*5*c*A2;
  operon_binding_A: O + A2 => OA2; cell*5*c*O*A2;
  operon_unbinding_A: OA2 => O + A2; cell*c*OA2;
  unbound_translation_A: O => O + A; cell*c*O;
  bound_translation_A: OA2 => OA2 + A; cell*c*OA2;
  decay_A: A => ; cell*.25*c*A;
  dimerization_B: 2 B => B2; cell*(5/2)*2*c*B*(B - 1);
  dedimerization_B: B2 => 2 B; cell*5*c*B2;
  operon_binding_B: B2 + O => OB2; cell*5*c*O*B2;
  operon_unbinding_B: OB2 => O + B2; cell*c*OB2;
  unbound_translation_B: O => O + B; cell*c*O;
  bound_translation_B: OB2 => OB2 + B; cell*c*OB2;
  decay_B: B => ; cell*.25*c*B;
end
