// SBML level 3 version 1

model bimolecular()
  // model units - substance: item, time: second, volume: litre, extent: item

  // Compartments:
  compartment cell = 2.1e-13;

  // Species:
  substanceOnly species A in cell = 100;
  substanceOnly species B in cell = 100;
  substanceOnly species C in cell = 0;

  // Reactions:
  Forward: A + B => C; k1*A*B/(avogadro*cell);
    k1 = 2.5293e9 per_molar_per_second;
  Reverse: C => A + B; k2*C;
    k2 = 1 per_second;

  // Unit definitions:
  unit per_second = 1 / second;
  unit per_item_per_second = 1 / (item * second);
  unit per_molar_per_second = litre / (mole * second);
end
