// SBML level 3 version 1

function Henri_Michaelis_Menten__irreversible(substrate, Km, V)
  V*substrate/(Km + substrate);
end
Henri_Michaelis_Menten__irreversible is "Henri-Michaelis-Menten (irreversible)";

function Constant_flux__irreversible(v)
  v;
end
Constant_flux__irreversible is "Constant flux (irreversible)";

function Mass_Action_Product_Substrate_Dependent(u, S, Rmax, substrate, product)
  u*S*Rmax*(substrate - product);
end
Mass_Action_Product_Substrate_Dependent is "Mass Action Product/Substrate Dependent";

function Mass_Action_FeedbackController(k1, u, substrate)
  k1*u*substrate;
end

function Double_Michaelis_Menten(k1, substrate1, k2, substrate2, k3)
  k1*substrate1/(k2 + substrate1)*(substrate2/(k3 + substrate2));
end
Double_Michaelis_Menten is "Double Michaelis-Menten";

function Mass_Action_M_dependent(p, substrate)
  p*substrate;
end

function Mass_Action_Two_rate_constants(k1, k2, u, substrate)
  k1*k2*u*substrate;
end

function Michaelis_Menten_FeedbackController(u, S, substrate, Km, Rmax)
  u*S*Rmax*substrate/(Km + substrate);
end
Michaelis_Menten_FeedbackController is "Michaelis-Menten-FeedbackController";

model New_Model()
  // model units - substance: substance, time: time, volume: volume, area: area, length: length, extent: substance

  // Compartments:
  compartment compartment = 3.351e-14 litre;

  // Species:
  species Ca2i in compartment = 5.3605e16;  // substance in mole
  species Ca2v in compartment = 0;  // substance in mole
  species Ca2g in compartment = 0;  // substance in mole
  species Ca2er in compartment = 0;  // substance in mole
  species $Ca2ex in compartment = 1.8069e20;  // substance in mole
  species CaM in compartment = 0;  // substance in mole
  species CaN in compartment = 0.6023;  // substance in mole
  species $calm in compartment;  // substance in mole
  species $calc in compartment;  // substance in mole
  species Cc in compartment = 2.9842e16;  // substance in mole
  species Cn in compartment = 0;  // substance in mole
  species C in compartment = 4.8184e17;  // substance in mole
  species M in compartment = 2.4092e17;  // substance in mole
  species X in compartment = 0;  // substance in mole
  species Rcn1 in compartment = 1.2046e18;  // substance in mole
  species Mck1 in compartment = 1.8069e19;  // substance in mole
  species Rcn1p in compartment = 0;  // substance in mole
  species Rcn1Mck1 in compartment = 0;  // substance in mole
  species CaNRcn1p in compartment = 0;  // substance in mole
  species CaNRcn1 in compartment = 0;  // substance in mole
  species Rcn1pCaNRcn1 in compartment = 0;  // substance in mole
  species Rcn1pCaNRcn1p in compartment = 0;  // substance in mole
  species CaNRcn1Mck1 in compartment = 0;  // substance in mole
  species CaNRcn1pCaN in compartment = 0;  // substance in mole
  species CaNRcn1pCaNRcn1 in compartment = 0;  // substance in mole
  species CaNRcn1pCaNRcn1p in compartment = 0;  // substance in mole

  // Parameters:
  Kpmc = 2.5899e18;
  Rpmc = 3.6138e21;
  S = 1;
  Kvcx = 6.023e19;
  Rvcx = 6.023e21;
  k6 = 0.5;
  Ryvc = 1.5;
  Rx = 1.5;
  k7 = 0.3;
  k9 = 7;
  Rpmr = 1.2046e21;
  Kpmr = 2.2887e17;
  k8 = 5;
  Rcod = 6.023e18;
  Kcod = 9.0345e18;
  Rerpmr = 1.2046e20;
  Kerpmr = 2.2887e17;
  Rerpmc = 3.6138e21;
  Kerpmc = 2.5899e18;
  k10 = 0.1;
  k18 = 0.6;
  Rex = 1.2046e20;
  Kex = 3.0115e20;
  CaM0 = 1.5057e19;
  CaN0 = 1.5057e19;
  k_1 = 10; k_1 is "k-1";
  k2 = 8.3015e-18;
  k_2 = 5; k_2 is "k-2";
  Iex = 2.4905e-19;
  k5 = 1.6603e-19;
  Kyvc = 6.023e19;
  a1 = 50;
  a2 = 8.3015e-20;
  Ca2gsteady = 1.8069e20;
  a3 = 50;
  a4 = 1.6603e-18;
  Ca2ersteady = 6.023e18;
  Ctotal = 2.9842e16;
  N = 13;
  lamda = 5;
  k3 = 0.4;
  k4 = 28;
  p = 0.03;
  i = 7.2276e17;
  var pi; pi is "pxi";
  k11 = 3.5;
  k12 = 2.7566e-36;
  k13 = 6.023e18;
  k19 = 6.023e17;
  k14 = 3.0115e22;
  k15 = 6.023e19;
  k16 = 6.023e19;
  k17 = 0.3;
  Kx = 2.4092e17;
  a101 = 9.9618e-17;
  k101 = 6;
  d101 = 24;
  a102 = 4.9809e-17;
  k102 = 6;
  d102 = 30;
  a104 = 4.9809e-17;
  k104 = 1.2;
  d104 = 30;
  a106 = 4.9809e-17;
  k106 = 18;
  d106 = 30;
  a107 = 2.9885e-17;
  d107 = 7.2;
  k107 = 0.3;
  a108 = 4.9809e-18;
  k108 = 0.6;
  d108 = 3;
  k109 = 1.2;
  a110 = 4.9809e-18;
  k110 = 0.18;
  d110 = 3;
  a112 = 4.9809e-18;
  k112 = 0.9;
  d112 = 3;
  a113 = 9.9618e-16;
  d113 = 3;
  a114 = 4.9809e-16;
  d114 = 3;

  // Assignment rules:
  u5 := X/(Kx + X);
  u7 := 1/(1 + a3*exp(a4*(Ca2ersteady - Ca2er)));
  u3 := 1/(1 + k5*CaN);
  u6 := 1/(1 + a1*exp(a2*(Ca2gsteady - Ca2g)));
  h := Cn*compartment/1000;
  pk12 := p*k12;
  pk11 := p*k11;
  u1 := 1/(1 + Iex*CaM);
  k1 := 1.373e-52*S;
  u4 := Ca2i/(Kyvc + Ca2i);
  L0 := 10^(-N/2);
  x := 1/((CaN + 1)*(1/6.023e23)*1000000)*(3*Rcn1p^2/(6.023e17^2 + Rcn1p^2))*(1 - 0.8*Rcn1^2/(6.023e17^2 + Rcn1^2));
  theta := 1/((x^(N + 1) - 1)/(x - 1) + L0*(((lamda*x)^(N + 1) - 1)/(lamda*x - 1)));
  rho := 1/(1 + L0*(((lamda*x)^(N + 1) - 1)*(x - 1)/((lamda*x - 1)*(x^(N + 1) - 1))));
  u2 := h*theta;
  k3rho := k3*rho;
  pk13 := p*k13;
  pi := p*i;
  k4rho := k4*(1 - rho);
  calm := CaM0 - CaM - CaN;
  calc := CaN0 - CaN;

  // Reactions:
  Ca2itoCa2vpmc: Ca2i => Ca2v; compartment*Michaelis_Menten_FeedbackController(u2, S, Ca2i, Kpmc, Rpmc);
  Ca2itoCa2vvcx: Ca2i => Ca2v; compartment*Michaelis_Menten_FeedbackController(u3, S, Ca2i, Kvcx, Rvcx);
  Ca2vtocomplex: Ca2v => ; compartment*k6*Ca2v;
  Ca2vtoCa2iyvc: Ca2v => Ca2i; compartment*Mass_Action_Product_Substrate_Dependent(u4, S, Ryvc, Ca2v, Ca2i);
  Ca2vtoCa2iX: Ca2v => Ca2i; compartment*Mass_Action_Product_Substrate_Dependent(u5, S, Rx, Ca2v, Ca2i);
  Ca2gtoCa2v: Ca2g => Ca2v; compartment*Mass_Action_Two_rate_constants(k7, k9, u6, Ca2g);
  Ca2itoCa2gpmr: Ca2i => Ca2g; compartment*Michaelis_Menten_FeedbackController(u2, S, Ca2i, Kpmr, Rpmr);
  Ca2gtoexternal: Ca2g => ; compartment*Mass_Action_Two_rate_constants(k18, k9, u6, Ca2g);
  Ca2ertoCa2g: Ca2er => Ca2g; compartment*Mass_Action_FeedbackController(k8, u7, Ca2er);
  Ca2itoCa2ercod: Ca2i => Ca2er; compartment*Michaelis_Menten_FeedbackController(u, S, Ca2i, Kcod, Rcod);
    u = 1;
  Ca2itoCa2ererpmr: Ca2i => Ca2er; compartment*Michaelis_Menten_FeedbackController(u2, S, Ca2i, Kerpmr, Rerpmr);
  Ca2itoCa2ererpmc: Ca2i => Ca2er; compartment*Michaelis_Menten_FeedbackController(u2, S, Ca2i, Kerpmc, Rerpmc);
  Ca2gtoCa2er: Ca2g => Ca2er; compartment*Mass_Action_Two_rate_constants(k10, k9, u6, Ca2g);
  Ca2extoCa2i: $Ca2ex => Ca2i; compartment*Michaelis_Menten_FeedbackController(u1, S, Ca2ex, Kex, Rex);
  calmtoCaM: 3 Ca2i + $calm => CaM; compartment*k1*Ca2i^3*calm;
  CaMtocalm: CaM => $calm + 3 Ca2i; compartment*Mass_Action_FeedbackController(k_1, S, CaM);
  CaMtoCaN: CaM + $calc => CaN; compartment*k2*CaM*calc;
  CaNtoCaM: CaN => CaM + $calc; compartment*Mass_Action_FeedbackController(k_2, S, CaN);
  CctoCn: Cc => Cn; compartment*k3rho*Cc;
  CntoCc: Cn => Cc; compartment*k4rho*Cn;
  Cformation: => C; compartment*Constant_flux__irreversible(pi);
  Cdegradation: C + M => M; compartment*Mass_Action_M_dependent(p, M);
  CtoM: C => C + M; compartment*pk11*C;
  CandMtoM: C + 2 M => 3 M + C; compartment*pk12*C*M^2;
  Mdegradation: M => ; compartment*Henri_Michaelis_Menten__irreversible(M, k19, pk13);
  Xformation: M + Ca2i => X + M + Ca2i; compartment*Double_Michaelis_Menten(k14, M, k15, Ca2i, k16);
  Xdegradation: X => ; compartment*k17*X;
  Rcn1toRcn1Mck1: Rcn1 + Mck1 => Rcn1Mck1; compartment*a101*Rcn1*Mck1;
  Rcn1Mck1toRcn1p: Rcn1Mck1 => Rcn1p + Mck1; compartment*k101*Rcn1Mck1;
  Rcn1Mck1toRcn1: Rcn1Mck1 => Rcn1 + Mck1; compartment*d101*Rcn1Mck1;
  Rcn1ptoCaNRcn1p: Rcn1p + CaN => CaNRcn1p; compartment*a102*Rcn1p*CaN;
  CaNRcn1ptoRcn1: CaNRcn1p => Rcn1 + CaN; compartment*k102*CaNRcn1p;
  CaNRcn1ptoRcn1p: CaNRcn1p => Rcn1p + CaN; compartment*d102*CaNRcn1p;
  Rcn1ptoRcn1pCaNRcn1: Rcn1p + CaNRcn1 => Rcn1pCaNRcn1; compartment*a104*Rcn1p*CaNRcn1;
  Rcn1pCaNRcn1toRcn1: Rcn1pCaNRcn1 => Rcn1 + CaNRcn1; compartment*k104*Rcn1pCaNRcn1;
  Rcn1pCaNRcn1toRcn1p: Rcn1pCaNRcn1 => Rcn1p + CaNRcn1; compartment*d104*Rcn1pCaNRcn1;
  Rcn1ptoRcn1pCaNRcn1p: Rcn1p + CaNRcn1p => Rcn1pCaNRcn1p; compartment*a106*Rcn1p*CaNRcn1p;
  Rcn1pCaNRcn1ptoRcn1: Rcn1pCaNRcn1p => Rcn1 + CaNRcn1p; compartment*k106*Rcn1pCaNRcn1p;
  Rcn1pCaNRcn1ptoRcn1p: Rcn1pCaNRcn1p => Rcn1p + CaNRcn1p; compartment*d106*Rcn1pCaNRcn1p;
  CaNRcn1toCaNRcn1Mck1: CaNRcn1 + Mck1 => CaNRcn1Mck1; compartment*a107*CaNRcn1*Mck1;
  CaNRcn1Mck1toCaNRcn1: CaNRcn1Mck1 => CaNRcn1 + Mck1; compartment*d107*CaNRcn1Mck1;
  CaNRcn1Mck1toCaNRcn1pslow: CaNRcn1Mck1 => CaNRcn1p + Mck1; compartment*k107*CaNRcn1Mck1;
  CaNRcn1ptoCaNRcn1pCaN: CaNRcn1p + CaN => CaNRcn1pCaN; compartment*a108*CaNRcn1p*CaN;
  CaNRcn1pCaNtoCaNRcn1: CaNRcn1pCaN => CaNRcn1 + CaN; compartment*k108*CaNRcn1pCaN;
  CaNRcn1pCaNtoCaNRcn1p: CaNRcn1pCaN => CaNRcn1p + CaN; compartment*d108*CaNRcn1pCaN;
  CaNRcn1Mck1toCaNRcn1pfast: CaNRcn1Mck1 => CaNRcn1p + Mck1; compartment*k109*CaNRcn1Mck1;
  CaNRcn1ptoCaNRcn1pCaNRcn1: CaNRcn1p + CaNRcn1 => CaNRcn1pCaNRcn1; compartment*a110*CaNRcn1p*CaNRcn1;
  CaNRcn1pCaNRcn1toCaNRcn1: CaNRcn1pCaNRcn1 => 2 CaNRcn1; compartment*k110*CaNRcn1pCaNRcn1;
  CaNRcn1pCaNRcn1toCanRcn1p: CaNRcn1pCaNRcn1 => CaNRcn1p + CaNRcn1; compartment*d110*CaNRcn1pCaNRcn1;
  CaNRcn1ptoCaNRcn1pCaNRcn1p: 2 CaNRcn1p => CaNRcn1pCaNRcn1p; compartment*a112*CaNRcn1p^2;
  CaNRcn1pCaNRcn1ptoCaNRcn1: CaNRcn1pCaNRcn1p => CaNRcn1 + CaNRcn1p; compartment*k112*CaNRcn1pCaNRcn1p;
  CaNRcn1pCaNRcn1ptoCaNRcn1p: CaNRcn1pCaNRcn1p => 2 CaNRcn1p; compartment*d112*CaNRcn1pCaNRcn1p;
  CaNtoCaNRcn1: CaN + Rcn1 => CaNRcn1; compartment*a113*CaN*Rcn1;
  CaNRcn1toCaN: CaNRcn1 => CaN + Rcn1; compartment*d113*CaNRcn1;
  CaNtoCaNRcn1p: CaN + Rcn1p => CaNRcn1p; compartment*a114*CaN*Rcn1p;
  CaNRcn1ptoCaN: CaNRcn1p => CaN + Rcn1p; compartment*d114*CaNRcn1p;

  // Unit definitions:
  unit length = metre;
  unit area = metre^2;
  unit volume = litre;
  unit time = 60 second;
  unit substance = item;
end
