// SBML level 3 version 1

model Dimerization_Reversible()
  // model units - substance: substance, time: time, volume: volume, area: area, length: length, extent: substance

  // Compartments:
  compartment volume = 1e-15 volume;

  // Species:
  species m in volume = 3.321078e-6;
  species d in volume = 0;

  // Reactions:
  binding: 2 m => d; volume*binding_k1*m^2;
    binding_k1 = 34326000000;
  unbinding: d => 2 m; volume*unbinding_k1*d;
    unbinding_k1 = 600;

  // Unit definitions:
  unit length = metre;
  unit area = metre^2;
  unit volume = litre;
  unit time = 60 second;
  unit substance = mole;
end
