// SBML level 3 version 1

function Constant_flux__irreversible(v)
  v;
end
Constant_flux__irreversible is "Constant flux (irreversible)";

model First_Order_Birth_Death()
  // model units - substance: substance, time: time, volume: volume, area: area, length: length, extent: substance

  // Compartments:
  compartment volume = 1e-15 volume;

  // Species:
  species n in volume = 1.660539e-6;

  // Reactions:
  birth_0: => n; volume*Constant_flux__irreversible(v);
    v = 9.9632e-5;
  death_0: n => ; volume*k1*n;
    k1 = 600;

  // Unit definitions:
  unit length = metre;
  unit area = metre^2;
  unit volume = litre;
  unit time = 60 second;
  unit substance = mole;
end
