// SBML level 3 version 1

model Second_Order_Reversible()
  // model units - substance: substance, time: time, volume: volume, area: area, length: length, extent: substance

  // Compartments:
  compartment volume = 1e-15 volume;

  // Species:
  species a in volume = 1.660539e-6;
  species b in volume = 1.660539e-6;
  species c in volume = 0;

  // Reactions:
  forward: a + b => c; volume*forward_k1*a*b;
    forward_k1 = 32520000000;
  backward: c => a + b; volume*backward_k1*c;
    backward_k1 = 600;

  // Unit definitions:
  unit length = metre;
  unit area = metre^2;
  unit volume = litre;
  unit time = 60 second;
  unit substance = mole;
end
