// SBML level 3 version 1

function Zeroth_Order_Kinetic_Hill(k0, k1, x, h, x50)
  k0 + (k1 - k0)*x^h/(x50^h + x^h);
end

model Self_Regulating_Gene()
  // model units - substance: substance, time: time, volume: volume, area: area, length: length, extent: substance

  // Compartments:
  compartment volume = 1e-15 volume;

  // Species:
  species x in volume = 1e17;

  // Reactions:
  birth: => x; volume*Zeroth_Order_Kinetic_Hill(k0, birth_k1, x, h, x50);
    k0 = 3e18; birth_k1 = 6e19; h = 2; x50 = 5e16;
  death: x => ; volume*death_k1*x;
    death_k1 = 600;

  // Unit definitions:
  unit length = metre;
  unit area = metre^2;
  unit volume = litre;
  unit time = 60 second;
  unit substance = item;
end
