// SBML level 3 version 1

function stochastic_second_order(C, S0, S1)
  C*S0*S1;
end

function stochastic_first_order(C0, S0)
  C0*S0;
end

function stochastic_second_order_self(C0, S0, S1)
  C0*S0*(S1 - 1);
end

model New_Model()
  // model units - substance: substance, time: time, volume: volume, area: area, length: length, extent: substance

  // Compartments:
  compartment cell = 1 volume;

  // Species:
  species A in cell = 4;
  species A2 in cell = 16;
  species OA2 in cell = 0;
  species B in cell = 1;
  species B2 in cell = 1;
  species OB2 in cell = 0;
  species O in cell = 1;

  // Parameters:
  c = 1;
  c_fast = 5*c;
  c_slow = 1/4*c;

  // Reactions:
  dimerization_A: 2 A => A2; cell*stochastic_second_order_self(c_fast, A, A);
  dedimerization_A: A2 => 2 A; cell*stochastic_first_order(c_fast, A2);
  operon_binding_A: O + A2 => OA2; cell*stochastic_second_order(c_fast, O, A2);
  operon_unbinding_A: OA2 => O + A2; cell*stochastic_first_order(c, OA2);
  unbound_translation_A: O => O + A; cell*stochastic_first_order(c, O);
  bound_translation_A: OA2 => OA2 + A; cell*stochastic_first_order(c, OA2);
  decay_A: A => ; cell*stochastic_first_order(c_slow, A);
  dimerization_B: 2 B => B2; cell*stochastic_second_order_self(c_fast, B, B);
  dedimerization_B: B2 => 2 B; cell*stochastic_first_order(c_fast, B2);
  operon_binding_B: B2 + O => OB2; cell*stochastic_second_order(c_fast, B2, O);
  operon_unbinding_B: OB2 => O + B2; cell*stochastic_first_order(c, OB2);
  unbound_translation_B: O => O + B; cell*stochastic_first_order(c, O);
  bound_translation_B: OB2 => OB2 + B; cell*stochastic_first_order(c, OB2);
  decay_B: B => ; cell*stochastic_first_order(c_slow, B);

  // Unit definitions:
  unit length = metre;
  unit area = metre^2;
  unit volume = dimensionless;
  unit time = second;
  unit substance = item;
end
