// SBML level 3 version 1

function zeroth_order_k_hill(x, kx50, klow, khigh, kh)
  klow + (khigh - klow)*(x^kh/(x^kh + kx50^kh));
end

function first_order(x, b)
  b*x;
end

model pulling()
  // model units - substance: item, time: second, volume: litre, extent: item

  // Compartments:
  compartment V = 1;

  // Species:
  substanceOnly species x in V = 0;

  // Parameters:
  kx50 = 94;
  klow = 10;
  khigh = 200;
  kh = 2.2;
  b = 1;

  // Reactions:
  birth: => x; zeroth_order_k_hill(x, kx50, klow, khigh, kh);
  death: x => ; first_order(x, b);

  // Unit definitions:
  unit per_second = 1 / second;
end
